#!/usr/bin/env python3
# -*- coding: utf-8 -*-
"""
Created on Thu May 15 16:55:06 2025

@author: benjamin
"""

import Sofa
import os
import numpy as np
from scipy.spatial.transform import Rotation as R
import Geometries.Constants as Const
import rigidification


# from stlib.physics.deformable import ElasticMaterialObject
# from stlib.physics.constraints import FixedBox
# from stlib.physics.collision import CollisionMesh


# from stlib.visuals import VisualModel

# from softrobots.actuators import PneumaticCavity
# from softrobots.actuators import VolumeEffector
# from softrobots.sensors  import PneumaticSensor


path = os.path.dirname(os.path.abspath(__file__))+'/Meshes/'
MeshesPath = os.path.dirname(os.path.abspath(__file__))+'/Geometries/'
GeneratedMeshesPath = os.path.dirname(os.path.abspath(__file__))+'/Geometries/'
TempPath = os.path.dirname(os.path.abspath(__file__))+'/Temp/'


class Controller(Sofa.Core.Controller):

    def __init__(self, *args, **kwargs):
        Sofa.Core.Controller.__init__(self, *args, **kwargs)
        print("Python::__init__::" + str(self.name.value))

        self.RigidMO = kwargs['RigidMO']
        self.CFF = kwargs['CFF']
        self.CFFSphereROI = kwargs['CFFSphereROI']
        self.t = 0

        # Trajectory parameters
        puntos = Const.MagnetGridPoints
        delta_z = -3.0
        self.trayectoria = self.trajectory_S(puntos, delta_z)
        self.indice = 0
        self.contador = 0


    def trajectory_S(self, puntos, delta_z):

        """
        Generates an S-shaped trajectory with vertical zigzags in Z at each point.
        """
        pts = np.array(puntos)
        x_vals = np.unique(pts[:,0])
        trayectoria = []
        invertir = False

        for x in x_vals:
            columna = pts[pts[:,0] == x]
            columna = columna[np.argsort(columna[:,1])]
            if invertir:
                columna = columna[::-1]
            for p in columna:
                x, y = p
                trayectoria.append([x, y, Const.MagneticSkinHeight/2])
                trayectoria.append([x, y, -delta_z])
                trayectoria.append([x, y, 0])
            invertir = not invertir

        return np.array(trayectoria)


    def MoveCFFSphereROI(self):
        if self.indice < len(self.trayectoria):
            x, y, z = self.trayectoria[self.indice]
            self.CFFSphereROI.centers = [[x, y, z]]
            self.indice += 1

    def onAnimateBeginEvent(self, eventType):
        self.MoveCFFSphereROI()
        # self.onKeypressedEvent()
        # self.mapCapCoordinatesTo3DCoords()
        self.CFF.totalForce.value = Const.identadorForce
        np.savetxt("MagnetPose_Direct.txt", self.RigidMO.position.value)
        print(f"MagnetPose: {self.RigidMO.position.value}")


def createScene(rootNode):

                rootNode.addObject('RequiredPlugin', pluginName='SofaPython3 SoftRobots SoftRobots.Inverse')
                rootNode.addObject('VisualStyle', displayFlags='hideWireframe showBehaviorModels hideCollisionModels hideBoundingCollisionModels showForceFields showInteractionForceFields')
                rootNode.findData('gravity').value = [0, 0, -9810] #
                #rootNode.findData('gravity').value = [0, 0, -1000] #
                rootNode.findData('dt').value = 0.02
                rootNode.addObject('FreeMotionAnimationLoop')
                #rootNode.addObject('QPInverseProblemSolver', printLog='1', epsilon="1e-1", maxIterations="1000", tolerance="1e-5")
                #rootNode.addObject('QPInverseProblemSolver', printLog=False, epsilon="0.0001", maxIterations="1000", tolerance="1e-5")
                rootNode.addObject('GenericConstraintSolver', tolerance="1e-12", maxIterations="10000")
                rootNode.addObject('BackgroundSetting', color='0.85 0.85 0.85')


                rootNode.addObject('LightManager')
                rootNode.addObject(
                    "PositionalLight",
                    name="light1",
                    color="0.8 0.8 0.8",
                    position=[0, 0, 10],
                )
                rootNode.addObject(
                    "PositionalLight",
                    name="light2",
                    color="0.8 0.8 0.8",
                    position=[0, 0, -10],
                )


                VolumetricMeshPath = GeneratedMeshesPath + 'MagneticSkin.vtk'

                SurfaceMeshPath = GeneratedMeshesPath + 'MagneticSkin.stl'


                #----------------------
                # Goal Node
                #----------------------


                #----------------------
                # Rigidification - start
                #----------------------


                completeMesh = rootNode.addChild('completeMesh')
                completeMesh.addObject('MeshVTKLoader', name='loader', filename=VolumetricMeshPath)
                completeMesh.addObject('TetrahedronSetTopologyContainer', src='@loader', name='container')
                completeMesh.init()
                MeshTetra = completeMesh.addObject('MeshTopology', name="AllMesh", src='@loader')


                Boxes = []
                for i in range(len(Const.rigidObjectsBoxCoords)):
                    boxTip = completeMesh.addObject('BoxROI', name='Tip'+str(i), box=[Const.rigidObjectsBoxCoords[i]], drawBoxes=True,
                                                    tetrahedra="@container.tetrahedra" , position="@container.position")
                    Boxes.append(boxTip)
                    boxTip.init()


                positionAllPoints = MeshTetra.findData('position').value;
                nbPoints = len(positionAllPoints)


                IndicesWithRigidIdx = np.empty((0,2), dtype=int)

                for (i,Box) in enumerate(Boxes):
                    IndicesNP = np.array(Box.indices.value, dtype=int)
                    NPoints = len(IndicesNP)
                    RigidIdx = np.ones(NPoints,dtype=int)*i
                    CurrentIndicesWithRigidIdx = np.append(IndicesNP.reshape((NPoints,1)), RigidIdx.reshape((NPoints,1)),1)
                    IndicesWithRigidIdx = np.append(IndicesWithRigidIdx, CurrentIndicesWithRigidIdx,0)

                # print(f"IndicesWithRigidIdx: {IndicesWithRigidIdx}")
                IndicesWithRigidIdxSorted = np.sort(IndicesWithRigidIdx[:,0],0)
                SortedIdxs = np.argsort(IndicesWithRigidIdx[:,0],0)
                SortedRigidIdxs = IndicesWithRigidIdx[:,1][SortedIdxs]
                # print(f"SortedRigidIdxs: {SortedRigidIdxs}")


                indicesTip = IndicesWithRigidIdxSorted.tolist()
                rigidBlocks = [IndicesWithRigidIdxSorted.tolist()]
                DeformableIndicesTotal = []


                for i in range(nbPoints):
                    if i not in indicesTip:
                        DeformableIndicesTotal.append(i)

                freeBlocks = np.sort(DeformableIndicesTotal)
                IdxsOrderedFreeBlocks = np.argsort(DeformableIndicesTotal)

#
                indexPairs = np.array(rigidification.fillIndexPairs(nbPoints,freeBlocks,rigidBlocks))

                # pointsBody = np.array(completeMesh.MainBody.pointsInROI.value).flatten().tolist()

                NPPointsDeformable = positionAllPoints[DeformableIndicesTotal,:]

                NPSortedPointsDeformable = NPPointsDeformable[IdxsOrderedFreeBlocks, :]
                PointsDeformable = NPSortedPointsDeformable.flatten().tolist()
                pointsBody = PointsDeformable
                #deformablePoints = pointsBody


                pointsTip = np.array(positionAllPoints[indicesTip,:]).flatten().tolist()


                rigidIndexPerPoint = SortedRigidIdxs.tolist()
                # rigidIndexPerPoint = [0] * len(indicesTip)

                solverNode = rootNode.addChild("solverNode")
                solverNode.addObject('EulerImplicitSolver',rayleighStiffness="0.1", rayleighMass="0.1")
                solverNode.addObject('SparseLDLSolver',name='preconditioner')
                solverNode.addObject('GenericConstraintCorrection', linearSolver='@preconditioner')
                # solverNode.addObject('MechanicalMatrixMapper', template='Vec3d,Rigid3d', object1='@./deformableNode/DeformableMech', object2='@./RigidNode/RigidMesh', nodeToParse='@./deformableNode/model' )
                #solverNode.addObject('MechanicalMatrixMapper', template='Rigid,Rigid', object1='@./RigidNode/RigidMesh', object2='@./RigidNode/RigidMesh', nodeToParse='@./RigidNode/RigidifiedNode', stopAtNodeToParse=True )


                deformableNode = solverNode.addChild("deformableNode")
                deformableNode.addObject('PointSetTopologyContainer', position=pointsBody)
                deformableNode.addObject('MechanicalObject', name='DeformableMech')
                #deformableNode.addObject('BoxROI', name='BoxForSliding', box=Constants.SlidingBoxCoords, drawBoxes='true')
                #deformableNode.addObject('PartialFixedConstraint', indices='@BoxForSliding.indices', fixedDirections=[0,0,1])


                RigidNode= solverNode.addChild('RigidNode')


                #RigidNode.addObject("MechanicalObject",template="Rigid3d",name="RigidMesh", position=[[0, 0, Const.Height, 0.23622992, 0.30639972, 0.12644464, 0.91341469]], showObject=True, showObjectScale=5) # orientation is 240 deg away from scene origin

                #TipOrientation = [0.14224426, 0.0996005 , 0.56486252, 0.80670728]#  #[0.       , 0.       , 0.5      , 0.8660254] #[0, 0., 0.70710678, -0.70710678] #

                #TipOrientation = [1,0,0,0]

                TipOrientation = [0, 0, 0, 1]

                nominal_pose = []
                for center in Const.rigidObjects:
                    # CurrentPose = [Const.MagnetCenters[i],Const.MagnetCenters[i],Const.MagnetCenters[i], 0,0,0,1]
                    CurrentPose = center + TipOrientation
                    nominal_pose += CurrentPose


                RigidMO = RigidNode.addObject("MechanicalObject",template="Rigid3d",name="RigidMesh", position=nominal_pose, showObject=True, showObjectScale=2) # orientation is 240 deg away from scene origin

                #RigidNode.addObject('BoxROI', name='BoxForSliding', box=Constants.SlidingBoxCoords, drawBoxes='true')
                #RigidNode.addObject('PartialFixedConstraint', indices=[0], fixedDirections=[0,0,0,1,1,0])

                RigidifiedNode= RigidNode.addChild('RigidifiedNode')

                RigidifiedNode.addObject('MechanicalObject', name='RigidifiedMesh', position = pointsTip, template = 'Vec3d', showObject = True, showObjectScale = 10, showColor = 1)

                RigidifiedNode.addObject("RigidMapping",globalToLocalCoords="true", rigidIndexPerPoint=rigidIndexPerPoint)

                model = deformableNode.addChild('model')
                RigidifiedNode.addChild(model)

                	#Heart
                model.addObject('EulerImplicitSolver', name='odesolver')
                #model.addObject('ShewchukPCGLinearSolver', iterations='15', name='linearsolver', tolerance='1e-5', preconditioners='preconditioner', use_precond=True, update_step='1')
                model.addObject('ShewchukPCGLinearSolver', iterations='15', name='linearsolver', tolerance='1e-5', update_step='1')

                model.addObject('MeshVTKLoader', name='loader', filename=VolumetricMeshPath)
                model.addObject('TetrahedronSetTopologyContainer', src='@loader', name='container')

                model.addObject('MechanicalObject', name='tetras', template='Vec3', showIndices=False, showIndicesScale='4e-5', rx='0', dz='0')
                model.addObject('UniformMass', totalMass='0.09')
                model.addObject('TetrahedronFEMForceField', template='Vec3', name='FEM', method='large', poissonRatio=Const.PoissonRatio,  youngModulus=Const.YoungsModulus)

                # model.addObject('BoxROI', name='boxROI', box=Const.BaseFixedBoxCoords, drawBoxes=True, position="@tetras.rest_position", tetrahedra="@container.tetrahedra")

                model.addObject('BoxROI', name='boxROI', box=Const.BoxROIFixCoords, drawBoxes=True, position="@tetras.rest_position", tetrahedra="@container.tetrahedra")
                model.addObject('RestShapeSpringsForceField', points='@boxROI.indices', stiffness='1e12')


                model.addObject('BoxROI', name='boxROIfixed', box=Const.BoxROIFixCoords1, drawBoxes=True, position="@tetras.rest_position", tetrahedra="@container.tetrahedra")
                model.addObject('RestShapeSpringsForceField', points='@boxROIfixed.indices', stiffness='1e12')
#               model.addObject('SparseLDLSolver', name='preconditioner')
#                model.addObject('LinearSolverConstraintCorrection', solverName='preconditioner')
#
#                model.addObject('MeshVTKLoader', name='loader', filename=VolumetricMeshPath)
#                model.addObject('TetrahedronSetTopologyContainer', src='@loader', name='container')
#
#                model.addObject('MechanicalObject', name='tetras', template='Vec3d', showIndices='false', showIndicesScale='4e-5')
#                model.addObject('UniformMass', totalMass='0.3')
#                model.addObject('TetrahedronFEMForceField', template='Vec3d', name='FEM', method='large', poissonRatio=Constants.PoissonRation,  youngModulus=Constants.YoungsModulus, drawAsEdges="0")
#
                model.addObject("SubsetMultiMapping",name="subsetMapping",template="Vec3d,Vec3d", input='@'+deformableNode.getPathName()+'/DeformableMech' + ' ' + '@'+RigidifiedNode.getPathName()+'/RigidifiedMesh' , output='@./tetras', indexPairs=indexPairs.tolist())


#                #----------------------
#                # Rigidification - end
#                #----------------------

#                model = rootNode.addChild('model')
#                model.addObject('EulerImplicit', name='odesolver')
#                model.addObject('PCGLinearSolver', name='linearSolver',iterations='25', tolerance='1.0e-9', preconditioners="precond")
#                model.addObject('SparseLDLSolver', name='precond')
#
#                model.addObject('MeshVTKLoader', name='loader', filename=VolumetricMeshPath, scale3d=[1, 1, 1])
#                model.addObject('TetrahedronSetTopologyContainer', src='@loader', name='container')
#                model.addObject('TetrahedronSetTopologyModifier')
#
#                model.addObject('MechanicalObject', name='tetras', template='Vec3d', showIndices='false', showIndicesScale='4e-5')
#                model.addObject('UniformMass', totalMass='0.1')
#                model.addObject('TetrahedronFEMForceField', template='Vec3d', name='FEM', method='large', poissonRatio=Const.PoissonRatio,  youngModulus=Const.YoungsModulus)
#
#                #model.addObject('BoxROI', name='boxROI', box='-10 -15 50 10 15 90', drawBoxes='true')
#                #model.addObject('RestShapeSpringsForceField', points='@boxROI.indices', stiffness="1e2")
#
#                model.addObject('BoxROI', name='BoxROI1', box=Const.BaseFixedBoxCoords, drawBoxes=True)
#                model.addObject('RestShapeSpringsForceField', points='@BoxROI1.indices', stiffness='1e12')
#
#                model.addObject('LinearSolverConstraintCorrection', name='GCS', solverName='precond')


		        ##########################################
                # Visualization                          #
                ##########################################
                modelVisu = model.addChild('visu')
                modelVisu.addObject('MeshSTLLoader', filename=SurfaceMeshPath, name="loader")
                modelVisu.addObject('OglModel', src="@loader", scale3d=[1, 1, 1])
                modelVisu.addObject('BarycentricMapping')

                ##########################################
                # Effector                               #
                ##########################################

                #MOPositions = [[0,0,0,0,0,1,0], [0,0,-100,0,0,1,0]]
                #Sensor = RigidNode.addChild('BendLabsSensor')

                #RigidNode.addObject('MechanicalObject', name='SensorPoints', template="Rigid3d", showObject=True, showObjectScale=5, position=MOPositions)

                #goal = rootNode.addChild('goal')
                #goal.addObject('MechanicalObject', name="goalMO", template='Rigid3d', position=[[0,10,-90,0., 0. , 0.25881905, -0.96592583]], showObject=True, showObjectScale=10)
                #RigidNode.addObject('PositionEffector', template='Rigid3d', indices=[0], effectorGoal="@../../goal/goalMO.position", useDirections='0 1 0 0 0 1')


                #effector.addObject('PositionEffector', indices=[i for i in range(len(goalMO.position.value))], template='Vec3', effectorGoal="@../../goal/goalMO.position", useDirections='1 1 1')

                #RigidNode.addObject('BendLabsEffector', template='Rigid3d', alpha=0.39269908169872414, beta=0.39269908169872414)


                BaseOrientation = TipOrientation
                #BaseOrientation = [1,0,0,0]
                #BaseOrientation = [0.        , 0.        , 0.70710678, 0.70710678]
                #BaseOrientation = [0.        , 0.        , 0.38268343, 0.92387953]
                #BLE = RigidNode.addObject('BendLabsEffector', template='Rigid3d', BaseCoord = [0,0,0]+BaseOrientation, idx=0, theta=0, phi=0, printLog=True)

                Goal = nominal_pose


                #FPA on deformable!
                CFFNode = model.addChild('CFFNode')
                CFFNode.addObject('MeshSTLLoader', filename=SurfaceMeshPath, name="loader")

                CFFMO = CFFNode.addObject('MechanicalObject', position='@loader.position') #position=[[1, -7.4, 2.3],[3.7, -7.4, 2.9],[6.4, -7.4, 2.3]], showObject=True, showObjectScale=20, showColor=[0,1,0])
                # # CFFSphereCenters = [[1, -8.4, 2.1],[3.7, -8.4, 2.6],[5.4, -8.4, 2.3]]
                # CFFSphereCenters = [[3.5, -6.5, 2.7],[3.7, -8.4, 2.6],[5.4, -8.4, 2.3]]
                # CenterIdx = 0
                CFFSphereROI = CFFNode.addObject('SphereROI', template="Vec3d", name='CFFSphereROI', centers=[[0,0,3]], radii=[Const.indenterRadius], drawSphere=True)
                CFFSphereROI.init()
                CFF = CFFNode.addObject('ConstantForceField', name='CFF1', template='Vec3', indices='@CFFSphereROI.indices', totalForce=[0, 0, 0]) #, showDirection=True, showVisuScale=10)
                CFFNode.addObject("BarycentricMapping")

                # MarkerNode = model.addChild('MarkerNode')
                # MarkerMO = MarkerNode.addObject('MechanicalObject', position=[[0,0,0]], showObject=True, showObjectScale=20, showColor=[0,1,0])
                # MarkerNode.addObject('BarycentricMapping')


                rootNode.addObject(Controller(name="ActuationController", RootNode=rootNode, RigidMO=RigidMO,
                                              CFF=CFF,
                                              CFFSphereROI=CFFSphereROI))


                return rootNode
